# Input written to comply with LAMMPS 2017-08-17 00:00:00

# Atomic Configuration
units           real
boundary        p p p
box tilt large
atom_style      charge
read_data       input.data

# Potential Setup
pair_style reax/c potential.control safezone 1.6
pair_coeff      * * potential.pot A B
fix qeq all qeq/reax 1 0.0 10.0 1e-6 reax/c
fix_modify qeq energy yes
compute reax all pair reax/c

# General Setup
neighbor 0.3 bin
neigh_modify check no delay 0 every 1
timestep        0.001

# Thermodynamic Information Output
thermo_style custom step temp epair emol etotal press c_reax[1]
thermo          1000

# Intial Atom Velocity
velocity all create 300 12345 dist gaussian mom yes
velocity all scale 300

# Stage 0: thermalise
dump            atom_info all custom 10 thermalise-output.traj element x y z q
dump_modify     atom_info append yes
dump_modify     atom_info sort id
dump_modify     atom_info element A B
variable step equal step
variable temp equal temp
variable etotal equal etotal
variable c_reax_1_ equal c_reax[1]
fix sys_info all print 100 "${step} ${temp} ${etotal} ${c_reax_1_}" title "step temp etotal c_reax_1_" append thermalise-sys_info.txt screen no
restart         0
fix             int all nvt temp 300 300 0.5
run             100

# Stage 1: equilibrate
unfix sys_info
unfix int
undump atom_info
compute         cna all cna/atom 3.0
dump            atom_info all custom 100 equilibrate-output.traj element x y z q c_cna
dump_modify     atom_info append yes
dump_modify     atom_info sort id
dump_modify     atom_info element A B
variable step equal step
variable temp equal temp
variable etotal equal etotal
variable c_reax_1_ equal c_reax[1]
fix sys_info all print 10 "${step} ${temp} ${etotal} ${c_reax_1_}" title "step temp etotal c_reax_1_" append equilibrate-sys_info.txt screen no
restart         200 equilibrate-calc.restart
fix             int all nvt temp 300 300 0.5
run             400

# Final Commands
variable final_energy equal etotal
print "final_energy: ${final_energy}"
print "END_OF_COMP"
